// SBML level 3 version 1

model main()
  // model units - substance: item, time: second, extent: item

  // Compartments:
  compartment c = 0.01 litre;

  // Species:
  species ATP in c = 0;
  species AMP in c = 0;
  species FTHF10 in c = 0;
  species PPI in c = 0;
  species THF in c = 0;
  species H2O in c = 0;
  species ALA in c = 0;
  species ARG in c = 0;
  species ASN in c = 0;
  species ASP in c = 0;
  species CYS in c = 0;
  species GLU in c = 0;
  species GLN in c = 0;
  species GLY in c = 0;
  species HIS in c = 0;
  species ILE in c = 0;
  species LEU in c = 0;
  species LYS in c = 0;
  species MET in c = 0;
  species PHE in c = 0;
  species PRO in c = 0;
  species SER in c = 0;
  species THR in c = 0;
  species TRP in c = 0;
  species TYR in c = 0;
  species VAL in c = 0;
  species MG471 in c = 0;
  species aminoacylated_MG471 in c = 0;
  species MG492 in c = 0;
  species aminoacylated_MG492 in c = 0;
  species MG495 in c = 0;
  species aminoacylated_MG495 in c = 0;
  species MG497 in c = 0;
  species aminoacylated_MG497 in c = 0;
  species MG523 in c = 0;
  species aminoacylated_MG523 in c = 0;
  species MG514 in c = 0;
  species aminoacylated_MG514 in c = 0;
  species MG489 in c = 0;
  species aminoacylated_MG489 in c = 0;
  species MG483 in c = 0;
  species aminoacylated_MG483 in c = 0;
  species MG502 in c = 0;
  species GLU_aminoacylated_MG502 in c = 0;
  species aminoacylated_MG502 in c = 0;
  species MG513 in c = 0;
  species aminoacylated_MG513 in c = 0;
  species MG493 in c = 0;
  species aminoacylated_MG493 in c = 0;
  species MG499 in c = 0;
  species aminoacylated_MG499 in c = 0;
  species MG518 in c = 0;
  species aminoacylated_MG518 in c = 0;
  species MG472 in c = 0;
  species aminoacylated_MG472 in c = 0;
  species MG486 in c = 0;
  species aminoacylated_MG486 in c = 0;
  species MG500 in c = 0;
  species aminoacylated_MG500 in c = 0;
  species MG508 in c = 0;
  species aminoacylated_MG508 in c = 0;
  species MG519 in c = 0;
  species aminoacylated_MG519 in c = 0;
  species MG520 in c = 0;
  species aminoacylated_MG520 in c = 0;
  species MG501 in c = 0;
  species aminoacylated_MG501 in c = 0;
  species MG509 in c = 0;
  species aminoacylated_MG509 in c = 0;
  species MG485 in c = 0;
  species aminoacylated_MG485 in c = 0;
  species MG488 in c = 0;
  species met_aminoacylated_MG488 in c = 0;
  species aminoacylated_MG488 in c = 0;
  species MG490 in c = 0;
  species aminoacylated_MG490 in c = 0;
  species MG484 in c = 0;
  species aminoacylated_MG484 in c = 0;
  species MG475 in c = 0;
  species aminoacylated_MG475 in c = 0;
  species MG487 in c = 0;
  species aminoacylated_MG487 in c = 0;
  species MG506 in c = 0;
  species aminoacylated_MG506 in c = 0;
  species MG507 in c = 0;
  species aminoacylated_MG507 in c = 0;
  species MG479 in c = 0;
  species aminoacylated_MG479 in c = 0;
  species MG510 in c = 0;
  species aminoacylated_MG510 in c = 0;
  species MG512 in c = 0;
  species aminoacylated_MG512 in c = 0;
  species MG496 in c = 0;
  species aminoacylated_MG496 in c = 0;
  species MG504 in c = 0;
  species aminoacylated_MG504 in c = 0;
  species MG504 in c = 0;
  species aminoacylated_MG504 in c = 0;
  species MG511 in c = 0;
  species aminoacylated_MG511 in c = 0;
  species MG_0004 in c = 0;
  species aminoacylated_MG_0004 in c = 0;
  species MG_292_TETRAMER in c = 0;
  species MG_378_MONOMER in c = 0;
  species MG_113_DIMER in c = 0;
  species MG_036_DIMER in c = 0;
  species MG_253_MONOMER in c = 0;
  species MG_462_MONOMER in c = 0;
  species MG_295_DIMER in c = 0;
  species MG_251_DIMER in c = 0;
  species MG_035_DIMER in c = 0;
  species MG_345_MONOMER in c = 0;
  species MG_266_MONOMER in c = 0;
  species MG_136_DIMER in c = 0;
  species MG_021_DIMER in c = 0;
  species MG_365_MONOMER in c = 0;
  species MG_194_195_TETRAMER in c = 0;
  species MG_283_DIMER in c = 0;
  species MG_005_DIMER in c = 0;
  species MG_375_DIMER in c = 0;
  species MG_126_DIMER in c = 0;
  species MG_455_DIMER in c = 0;
  species MG_334_MONOMER in c = 0;
  species MG_292_TETRAMER in c = 0;

  // Parameters:
  k_mg471_aminoacylation = 456 per_minute;
  k_mg472_aminoacylation = 255.762 per_minute;
  k_mg475_aminoacylation = 456 per_minute;
  k_mg479_aminoacylation = 5400 per_minute;
  k_mg483_aminoacylation = 8514 per_minute;
  k_mg484_aminoacylation = 840 per_minute;
  k_mg485_aminoacylation = 192 per_minute;
  k_mg486_aminoacylation = 255.762 per_minute;
  k_mg487_aminoacylation = 456 per_minute;
  k_mg488_aminoacylation = 192 per_minute;
  k_mg488_formyltransferase = 456 per_minute;
  k_mg489_aminoacylation = 456 per_minute;
  k_mg490_aminoacylation = 324 per_minute;
  k_mg492_aminoacylation = 168 per_minute;
  k_mg493_aminoacylation = 456 per_minute;
  k_mg495_aminoacylation = 168 per_minute;
  k_mg496_aminoacylation = 456 per_minute;
  k_mg497_aminoacylation = 168 per_minute;
  k_mg499_aminoacylation = 456 per_minute;
  k_mg500_aminoacylation = 306 per_minute;
  k_mg501_aminoacylation = 456 per_minute;
  k_mg502_aminoacylation = 264 per_minute;
  k_mg502_amidotransferase = 57.6 per_minute;
  k_mg503_aminoacylation = 44.4 per_minute;
  k_mg504_aminoacylation = 456 per_minute;
  k_mg506_aminoacylation = 456 per_minute;
  k_mg507_aminoacylation = 456 per_minute;
  k_mg508_aminoacylation = 306 per_minute;
  k_mg509_aminoacylation = 456 per_minute;
  k_mg510_aminoacylation = 5400 per_minute;
  k_mg511_aminoacylation = 456 per_minute;
  k_mg512_aminoacylation = 5400 per_minute;
  k_mg513_aminoacylation = 264 per_minute;
  k_mg514_aminoacylation = 1620 per_minute;
  k_mg518_aminoacylation = 8520 per_minute;
  k_mg519_aminoacylation = 306 per_minute;
  k_mg520_aminoacylation = 306 per_minute;
  k_mg523_aminoacylation = 168 per_minute;
  k_mg_0004_aminoacylation = 456 per_minute;

  // Reactions:
  MG471_Aminoacylation: ALA + ATP + MG471 => AMP + PPI + aminoacylated_MG471; k_mg471_aminoacylation*ALA*ATP;  // modifiers: MG_292_TETRAMER
  MG472_Aminoacylation: ILE + ATP + MG472 => AMP + PPI + aminoacylated_MG472; k_mg472_aminoacylation*ILE*ATP;  // modifiers: MG_345_MONOMER
  MG475_Aminoacylation: SER + ATP + MG475 => AMP + PPI + aminoacylated_MG475; k_mg475_aminoacylation*SER*ATP;  // modifiers: MG_005_DIMER
  MG479_Aminoacylation: THR + ATP + MG479 => AMP + PPI + aminoacylated_MG479; k_mg479_aminoacylation*THR*ATP;  // modifiers: MG_375_DIMER
  MG483_Aminoacylation: CYS + ATP + MG483 => AMP + PPI + aminoacylated_MG483; k_mg483_aminoacylation*MG483*CYS*ATP;  // modifiers: MG_253_MONOMER
  MG484_Aminoacylation: PRO + ATP + MG484 => AMP + PPI + aminoacylated_MG484; k_mg484_aminoacylation*MG484*PRO*ATP;  // modifiers: MG_283_DIMER
  MG485_Aminoacylation: MET + ATP + MG485 => AMP + PPI + aminoacylated_MG485; k_mg485_aminoacylation*MG485*MET*ATP;  // modifiers: MG_021_DIMER
  MG486_Aminoacylation: ILE + ATP + MG486 => AMP + PPI + aminoacylated_MG486; k_mg486_aminoacylation*MG486*ILE*ATP;  // modifiers: MG_345_MONOMER
  MG487_Aminoacylation: SER + ATP + MG487 => AMP + PPI + aminoacylated_MG487; k_mg487_aminoacylation*MG487*SER*ATP;  // modifiers: MG_005_DIMER
  MG488_Aminoacylation: MET + ATP + MG488 => AMP + PPI + met_aminoacylated_MG488; k_mg488_aminoacylation*MG488*MET*ATP;  // modifiers: MG_021_DIMER
  MG488_Formyltransferase: met_aminoacylated_MG488 + FTHF10 + H2O => THF + aminoacylated_MG488; k_mg488_formyltransferase*met_aminoacylated_MG488*H2O*FTHF10;  // modifiers: MG_365_MONOMER
  MG489_Aminoacylation: ASP + ATP + MG489 => AMP + PPI + aminoacylated_MG489; k_mg489_aminoacylation*MG489*ASP*ATP;  // modifiers: MG_036_DIMER
  MG490_Aminoacylation: PHE + ATP + MG490 => AMP + PPI + aminoacylated_MG490; k_mg490_aminoacylation*MG490*PHE*ATP;  // modifiers: MG_194_195_TETRAMER
  MG492_Aminoacylation: ARG + ATP + MG492 => AMP + PPI + aminoacylated_MG492; k_mg492_aminoacylation*MG492*ARG*ATP;  // modifiers: MG_378_MONOMER
  MG493_Aminoacylation: GLY + ATP + MG493 => AMP + PPI + aminoacylated_MG493; k_mg493_aminoacylation*MG493*GLY*ATP;  // modifiers: MG_251_DIMER
  MG495_Aminoacylation: ARG + ATP + MG495 => AMP + PPI + aminoacylated_MG495; k_mg495_aminoacylation*MG495*ARG*ATP;  // modifiers: MG_378_MONOMER
  MG496_Aminoacylation: TRP + ATP + MG496 => AMP + PPI + aminoacylated_MG496; k_mg496_aminoacylation*MG496*TRP*ATP;  // modifiers: MG_126_DIMER
  MG497_Aminoacylation: ARG + ATP + MG497 => AMP + PPI + aminoacylated_MG497; k_mg497_aminoacylation*MG497*ARG*ATP;  // modifiers: MG_378_MONOMER
  MG499_Aminoacylation: GLY + ATP + MG499 => AMP + PPI + aminoacylated_MG499; k_mg499_aminoacylation*MG499*GLY*ATP;  // modifiers: MG_251_DIMER
  MG500_Aminoacylation: LEU + ATP + MG500 => AMP + PPI + aminoacylated_MG500; k_mg500_aminoacylation*MG500*LEU*ATP;  // modifiers: MG_266_MONOMER
  MG501_Aminoacylation: LYS + ATP + MG501 => AMP + PPI + aminoacylated_MG501; k_mg501_aminoacylation*MG501*LYS*ATP;  // modifiers: MG_136_DIMER
  MG502_Aminoacylation: GLU + ATP + MG502 => AMP + PPI + GLU_aminoacylated_MG502; k_mg502_aminoacylation*MG502*GLU*ATP;  // modifiers: MG_295_MONOMER
  MG502_Amidotransferase: GLU_aminoacylated_MG502 + ATP + GLN => ADP + PI + GLU + aminoacylated_MG502; k_mg502_amidotransferase*GLU_aminoacylated_MG502*GLN*ATP;  // modifiers: MG_462_MONOMER
  MG503_Aminoacylation: TYR + ATP + MG503 => AMP + PPI + aminoacylated_MG503; k_mg503_aminoacylation*MG503*TYR*ATP;  // modifiers: MG_455_DIMER
  MG504_Aminoacylation: TRP + ATP + MG504 => AMP + PPI + aminoacylated_MG504; k_mg504_aminoacylation*MG504*TRP*ATP;  // modifiers: MG_126_DIMER
  MG506_Aminoacylation: SER + ATP + MG506 => AMP + PPI + aminoacylated_MG506; k_mg506_aminoacylation*MG506*SER*ATP;  // modifiers: MG_005_DIMER
  MG507_Aminoacylation: SER + ATP + MG507 => AMP + PPI + aminoacylated_MG507; k_mg507_aminoacylation*MG507*SER*ATP;  // modifiers: MG_005_DIMER
  MG508_Aminoacylation: LEU + ATP + MG508 => AMP + PPI + aminoacylated_MG508; k_mg508_aminoacylation*MG508*LEU*ATP;  // modifiers: MG_266_MONOMER
  MG509_Aminoacylation: LYS + ATP + MG509 => AMP + PPI + aminoacylated_MG509; k_mg509_aminoacylation*MG509*LYS*ATP;  // modifiers: MG_136_DIMER
  MG510_Aminoacylation: THR + ATP + MG510 => AMP + PPI + aminoacylated_MG510; k_mg510_aminoacylation*MG510*THR*ATP;  // modifiers: MG_375_DIMER
  MG511_Aminoacylation: VAL + ATP + MG511 => AMP + PPI + aminoacylated_MG511; k_mg511_aminoacylation*MG511*VAL*ATP;  // modifiers: MG_334_MONOMER
  MG512_Aminoacylation: THR + ATP + MG512 => AMP + PPI + aminoacylated_MG512; k_mg512_aminoacylation*MG512*THR*ATP;  // modifiers: MG_375_DIMER
  MG513_Aminoacylation: GLU + ATP + MG513 => AMP + PPI + aminoacylated_MG513; k_mg513_aminoacylation*MG513*GLU*ATP;  // modifiers: MG_462_MONOMER
  MG514_Aminoacylation: ASN + ATP + MG514 => AMP + PPI + aminoacylated_MG514; k_mg514_aminoacylation*MG514*ASN*ATP;  // modifiers: MG_113_DIMER
  MG518_Aminoacylation: HIS + ATP + MG518 => AMP + PPI + aminoacylated_MG518; k_mg518_aminoacylation*MG518*HIS*ATP;  // modifiers: MG_035_DIMER
  MG519_Aminoacylation: LEU + ATP + MG519 => AMP + PPI + aminoacylated_MG519; k_mg519_aminoacylation*MG519*LEU*ATP;  // modifiers: MG_266_MONOMER
  MG520_Aminoacylation: LEU + ATP + MG520 => AMP + PPI + aminoacylated_MG520; k_mg520_aminoacylation*MG520*LEU*ATP;  // modifiers: MG_266_MONOMER
  MG523_Aminoacylation: ARG + ATP + MG523 => AMP + PPI + aminoacylated_MG523; k_mg523_aminoacylation*MG523*ARG*ATP;  // modifiers: MG_378_MONOMER
  MG_0004_Aminoacylation: ALA + ATP + MG_0004 => AMP + PPI + aminoacylated_MG_0004; k_mg_0004_aminoacylation*MG_0004*ALA*ATP;  // modifiers: MG_292_TETRAMER

  // Unit definitions:
  unit per_second = 1 / second;
  unit per_minute = 1 / (60 second);
end
